OpenVSP model (file version 5), 4 components.
Geometry view with OpenVSP parameter names; values to 6 digits, angles in degrees, lengths in the model's unit.
Overall bounding box: X_Min=-3.5692e-06 X_Len=2.96 Y_Min=-4.82613 Y_Len=9.65227 Z_Min=-1.53569 Z_Len=1.83466

Wing "Controlframe"
  location (X Y Z) 0.968 0 -1.52575, rotation 0 0 0
  symmetric about XZ
  bounding box size 0.544642 1.3961 1.5295
  totals: TotalSpan=4.61815 TotalProjectedSpan=0.189588 TotalChord=0.0687813 TotalArea=0.321181 TotalAR=0.111911 RelativeTwistFlag=1
  root: chord 0.0685, twist 0, NACA 4-series Camber=0 CamberLoc=0.2 ThickChord=0.29
  sections:
    n  Span        Root_Chord  Tip_Chord  Area         Sweep  Sweep_Location  Dihedral  Twist  Twist_Location  tip airfoil
    1  0.2285      0.0685      0.0685     0.0156523    0      0               0         0      0.25            as above
    2  0.1525      0.0685      0.0685     0.0104463    33.25  0               0         0      0.25            as above
    3  0.2915      0.0685      0.0685     0.0199677    0      0               0         0      0.25            as above
    4  0.00792252  0.0685      0.0685     0.000542693  0      0               22.5      0      0.25            NACA 4-series Camber=0 CamberLoc=0.2 ThickChord=0.247042
    5  0.00792252  0.0685      0.0685     0.000542693  0      0               45        0      0.25            NACA 4-series Camber=0 CamberLoc=0.2 ThickChord=0.29
    6  0.00536463  0.0685      0.0685     0.000367477  0      0               67.5      0      0.25            as above
    7  0.00536463  0.0685      0.07       0.0003715    0      0               90        0      0               NACA 4-series Camber=0 CamberLoc=0.2 ThickChord=0.285
    8  1.61        0.07        0.07       0.1127       13.1   0               111.6     0      0               as above

Fuselage "FuselageGeom"
  location (X Y Z) 0.48532 0 -1.34205, rotation 0 0 0
  bounding box size 2 0.531825 0.381212
  Design: Length=2
  cross sections:
    n  XLocPercent  YLocPercent  ZLocPercent  shape
    0  0            0            0            point
    1  0.0326233    0            0            ellipse Ellipse_Height=0.28 Ellipse_Width=0.23
    2  0.076873     0            0            as above
    3  0.106603     0            0            ellipse Ellipse_Height=0.176646 Ellipse_Width=0.219325
    4  0.142785     0            0            ellipse Ellipse_Height=0.217229 Ellipse_Width=0.459037
    5  0.417841     0            0            ellipse Ellipse_Height=0.264865 Ellipse_Width=0.531825
    6  0.466808     0            0.0097352    ellipse Ellipse_Height=0.236817 Ellipse_Width=0.316374
    7  1            0            0            point

Wing "VG slack"
  location (X Y Z) 0 0 0, rotation 0 0 0
  symmetric about XZ
  bounding box size 2.91794 9.65227 0.416993
  totals: TotalSpan=9.662 TotalProjectedSpan=9.65227 TotalChord=1.43794 TotalArea=13.8934 TotalAR=6.70582
  root: chord 1.855, twist 0, airfoil file "AF/home/timbo/myrepos/gitlab/HG-dev/aerodynamic-modelling/data/aerofoils/3E140/0.dat"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 BaseThickChord=0.124054 ThickChord=0.124054
  sections:
    n  Span      Root_Chord  Tip_Chord  Area      Sweep  Sweep_Location  Dihedral  Twist  Twist_Location  tip airfoil
    1  0.603875  1.855       1.746      1.08728   23.03  0               0.05      -3.62  0               airfoil file "AF/home/timbo/myrepos/gitlab/HG-dev/aerodynamic-modelling/data/aerofoils/3E140/1.dat"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 BaseThickChord=0.112756 ThickChord=0.112756
    2  0.603875  1.746       1.7        1.04048   23.09  0               -1.99     -6.78  0               airfoil file "AF/home/timbo/myrepos/gitlab/HG-dev/aerodynamic-modelling/data/aerofoils/3E140/2.dat"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 BaseThickChord=0.106294 ThickChord=0.106294
    3  0.603875  1.7         1.647      1.01058   23.57  0               -1.99     -8.9   0               airfoil file "AF/home/timbo/myrepos/gitlab/HG-dev/aerodynamic-modelling/data/aerofoils/3E140/3.dat"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 BaseThickChord=0.104028 ThickChord=0.104028
    4  0.603875  1.647       1.568      0.970729  24.5   0               -2.18     -11.1  0               airfoil file "AF/home/timbo/myrepos/gitlab/HG-dev/aerodynamic-modelling/data/aerofoils/3E140/4.dat"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 BaseThickChord=0.102534 ThickChord=0.102534
    5  0.603875  1.568       1.453      0.912153  25.7   0               -2.41     -14.8  0               airfoil file "AF/home/timbo/myrepos/gitlab/HG-dev/aerodynamic-modelling/data/aerofoils/3E140/5.dat"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 BaseThickChord=0.103647 ThickChord=0.103647
    6  0.603875  1.453       1.272      0.82278   27.82  0               -0.57     -18    0               airfoil file "AF/home/timbo/myrepos/gitlab/HG-dev/aerodynamic-modelling/data/aerofoils/3E140/6.dat"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 BaseThickChord=0.10863 ThickChord=0.10863
    7  0.603875  1.272       0.947      0.669999  31.22  0               4.13      -20    0               airfoil file "AF/home/timbo/myrepos/gitlab/HG-dev/aerodynamic-modelling/data/aerofoils/3E140/7.dat"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 BaseThickChord=0.103221 ThickChord=0.103221
    8  0.603875  0.947       0.486      0.432676  31.86  0               4.13      -20    0               airfoil file "AF/home/timbo/myrepos/gitlab/HG-dev/aerodynamic-modelling/data/aerofoils/3E140/8.dat"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 BaseThickChord=0.151965 ThickChord=0.151965

Wing "VG tight"
  location (X Y Z) 0 0 0, rotation 0 0 0
  symmetric about XZ
  bounding box size 2.96 9.65227 0.318959
  totals: TotalSpan=9.662 TotalProjectedSpan=9.65227 TotalChord=1.43794 TotalArea=13.8934 TotalAR=6.70582
  root: chord 1.855, twist 0, airfoil file "AF/home/timbo/myrepos/gitlab/HG-dev/aerodynamic-modelling/data/aerofoils/3E140/0.dat"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 BaseThickChord=0.124054 ThickChord=0.124054
  sections:
    n  Span      Root_Chord  Tip_Chord  Area      Sweep  Sweep_Location  Dihedral  Twist   Twist_Location  tip airfoil
    1  0.603875  1.855       1.746      1.08728   23.03  0               0.05      0.02    0               airfoil file "AF/home/timbo/myrepos/gitlab/HG-dev/aerodynamic-modelling/data/aerofoils/3E140/1.dat"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 BaseThickChord=0.112756 ThickChord=0.112756
    2  0.603875  1.746       1.7        1.04048   23.09  0               -1.99     -0.47   0               airfoil file "AF/home/timbo/myrepos/gitlab/HG-dev/aerodynamic-modelling/data/aerofoils/3E140/2.dat"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 BaseThickChord=0.106294 ThickChord=0.106294
    3  0.603875  1.7         1.647      1.01058   23.57  0               -1.99     -0.81   0               airfoil file "AF/home/timbo/myrepos/gitlab/HG-dev/aerodynamic-modelling/data/aerofoils/3E140/3.dat"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 BaseThickChord=0.104028 ThickChord=0.104028
    4  0.603875  1.647       1.568      0.970729  24.5   0               -2.18     -2.2    0               airfoil file "AF/home/timbo/myrepos/gitlab/HG-dev/aerodynamic-modelling/data/aerofoils/3E140/4.dat"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 BaseThickChord=0.102534 ThickChord=0.102534
    5  0.603875  1.568       1.453      0.912153  25.7   0               -2.41     -4.58   0               airfoil file "AF/home/timbo/myrepos/gitlab/HG-dev/aerodynamic-modelling/data/aerofoils/3E140/5.dat"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 BaseThickChord=0.103647 ThickChord=0.103647
    6  0.603875  1.453       1.272      0.82278   27.82  0               -0.57     -7.74   0               airfoil file "AF/home/timbo/myrepos/gitlab/HG-dev/aerodynamic-modelling/data/aerofoils/3E140/6.dat"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 BaseThickChord=0.10863 ThickChord=0.10863
    7  0.603875  1.272       0.947      0.669999  31.22  0               4.13      -10.24  0               airfoil file "AF/home/timbo/myrepos/gitlab/HG-dev/aerodynamic-modelling/data/aerofoils/3E140/7.dat"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 BaseThickChord=0.103221 ThickChord=0.103221
    8  0.603875  0.947       0.486      0.432676  31.86  0               4.13      -14.93  0               airfoil file "AF/home/timbo/myrepos/gitlab/HG-dev/aerodynamic-modelling/data/aerofoils/3E140/8.dat"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 BaseThickChord=0.151965 ThickChord=0.151965

VSPAERO settings: Sref=13.5 bref=9.662 cref=1.43794 Xcg=1.19748 Ycg=0 Zcg=0 AlphaStart=5 AlphaEnd=20 AlphaNpts=6 BetaStart=0 BetaEnd=0 BetaNpts=1 MachStart=0 MachEnd=0 MachNpts=1 ReCref=1e+06 Vinf=100 Rho=0.002377
