OpenVSP model (file version 5), 6 components.
Geometry view with OpenVSP parameter names; values to 6 digits, angles in degrees, lengths in the model's unit.
Overall bounding box: X_Min=-1.3 X_Len=5.14901 Y_Min=-4.05926 Y_Len=8.11852 Z_Min=-0.538621 Z_Len=1.81862

Wing "Wing"
  location (X Y Z) 0 0 0, rotation 0 0 0
  symmetric about XZ
  bounding box size 3.32348 7.95625 0.219503
  totals: TotalSpan=7.95625 TotalProjectedSpan=7.95625 TotalChord=1.2875 TotalArea=9.03609 TotalAR=7.00545
  root: chord 2.55, twist 0, NACA 4-series Camber=0.03 CamberLoc=0.347273 ThickChord=0.08
  sections:
    n  Span     Root_Chord  Tip_Chord  Area     Sweep  Sweep_Location  Dihedral  Twist  Twist_Location  tip airfoil
    1  1.4      2.55        1.05       2.52     51     0               0         0      0.25            as above
    2  2.57813  1.05        0.5        1.99805  23     0               0         0      0.25            as above

Wing "VertStab", child of "Wing"
  location (X Y Z) 2.82 -4.02174 0, rotation 90 0 0
  symmetric about XZ
  bounding box size 1.02901 8.11852 1.28
  totals: TotalSpan=2.56 TotalProjectedSpan=2.56 TotalChord=0.52 TotalArea=1.3312 TotalAR=4.92308
  root: chord 0.75, twist 0, NACA 4-series Camber=0 CamberLoc=0.2 ThickChord=0.1
  sections:
    n  Span  Root_Chord  Tip_Chord  Area    Sweep  Sweep_Location  Dihedral  Twist  Twist_Location  tip airfoil
    1  1.28  0.75        0.29       0.6656  30     0               0         0      0.25            as above

Wing "Canard"
  location (X Y Z) -0.7 0 0, rotation 0 0 0
  symmetric about XZ
  bounding box size 0.35 3.55 0.0350203
  totals: TotalSpan=3.55 TotalProjectedSpan=3.55 TotalChord=0.35 TotalArea=1.2425 TotalAR=10.1429
  root: chord 0.35, twist 0, NACA 4-series Camber=0 CamberLoc=0.2 ThickChord=0.1
  sections:
    n  Span   Root_Chord  Tip_Chord  Area     Sweep  Sweep_Location  Dihedral  Twist  Twist_Location  tip airfoil
    1  1.775  0.35        0.35       0.62125  0      0               0         0      0.25            as above

Human "Human"
  location (X Y Z) 0.597015 0 -0.186567, rotation 0 10 0
  mass: Density=2482.94 Shell_Flag=0 Mass_Area=1 Mass_Prior=0
  Anthropometric: Age=30 AutoDensity=1 BMI=27.7 BMI_pct=0.5 GenderFlag=0 LenUnit=2 Mass=187.021 MassUnit=3 SitFrac=0.51 Stature=1.75 Stature_pct=0.469779 Volume=0.0753224

Fuselage "Fuselage"
  location (X Y Z) -1.3 0 -0.271739, rotation 0 0 0
  bounding box size 4.3333 0.753322 0.786881
  Design: Length=4.25
  cross sections:
    n  XLocPercent  YLocPercent  ZLocPercent  shape
    0  0            0            -0.005       point
    1  0.315217     0            0.036        super ellipse Super_Height=0.65 Super_M=4 Super_MaxWidthLoc=0 Super_N=4 Super_Width=0.6
    2  0.5          0            0.04         super ellipse Super_Height=0.7 Super_M=4 Super_MaxWidthLoc=0 Super_N=4 Super_Width=0.62
    3  0.99         0            0.07         super ellipse Super_Height=0.3 Super_M=2.5 Super_MaxWidthLoc=0 Super_N=2.5 Super_Width=0.75
    4  1            0            0.07         point

Fuselage "Canopy", child of "Fuselage"
  location (X Y Z) -0.035 0 0.2, rotation 0 0 0
  bounding box size 2.65909 0.5 0.643636
  Design: Length=2.65909
  cross sections:
    n  XLocPercent  YLocPercent  ZLocPercent  shape
    0  0            0            0            point
    1  0.25         0            0            ellipse Ellipse_Height=0.55 Ellipse_Width=0.5
    2  0.5          0            0            ellipse Ellipse_Height=0.52 Ellipse_Width=0.5
    3  0.75         0            -0.03        ellipse Ellipse_Height=0.5 Ellipse_Width=0.4
    4  1            0            -0.0725      point
