OpenVSP model (file version 5), 7 components.
Geometry view with OpenVSP parameter names; values to 6 digits, angles in degrees, lengths in the model's unit.
Overall bounding box: X_Min=0 X_Len=46.8 Y_Min=-18 Y_Len=36 Z_Min=-2.45 Z_Len=4.9

Fuselage "Fuselage"
  location (X Y Z) 0 0 0, rotation 0 0 0
  bounding box size 46.8 4.9 4.9
  Design: Length=46.8
  cross sections:
    n  XLocPercent  YLocPercent  ZLocPercent  shape
    0  0            0            0            point
    1  0.227137     0            0            circle Circle_Diameter=4.9
    2  0.850427     0            0            circle Circle_Diameter=4.82
    3  0.9999       0            0            circle Circle_Diameter=3.6
    4  1            0            0            point

Wing "Wing1"
  location (X Y Z) 19.27 0 1.62, rotation 0 0 0
  symmetric about XZ
  bounding box size 11.8215 36 0.685678
  totals: TotalSpan=36 TotalProjectedSpan=36 TotalChord=5.999 TotalArea=215.964 TotalAR=6.001
  root: chord 8.57, twist 0, NACA 63-series A=1 IdealCl=0 ThickChord=0.08
  sections:
    n  Span  Root_Chord  Tip_Chord  Area     Sweep  Sweep_Location  Dihedral  Twist  Twist_Location  tip airfoil
    1  18    8.57        3.428      107.982  25     0               0         0      0.25            as above

Wing "Wing2"
  location (X Y Z) 18.87 0 1.62, rotation 0 0 0
  symmetric about XZ
  bounding box size 16.0317 36 0.685678
  totals: TotalSpan=36 TotalProjectedSpan=36 TotalChord=5.999 TotalArea=215.964 TotalAR=6.001
  root: chord 8.57, twist 0, NACA 63-series A=1 IdealCl=0 ThickChord=0.08
  sections:
    n  Span  Root_Chord  Tip_Chord  Area     Sweep  Sweep_Location  Dihedral  Twist  Twist_Location  tip airfoil
    1  18    8.57        3.428      107.982  35     0               0         0      0.25            as above

Wing "Wing3"
  location (X Y Z) 18.34 0 1.62, rotation 0 0 0
  symmetric about XZ
  bounding box size 21.428 36 0.685678
  totals: TotalSpan=36 TotalProjectedSpan=36 TotalChord=5.999 TotalArea=215.964 TotalAR=6.001
  root: chord 8.57, twist 0, NACA 63-series A=1 IdealCl=0 ThickChord=0.08
  sections:
    n  Span  Root_Chord  Tip_Chord  Area     Sweep  Sweep_Location  Dihedral  Twist  Twist_Location  tip airfoil
    1  18    8.57        3.428      107.982  45     0               0         0      0.25            as above

Wing "Wing6"
  location (X Y Z) 18.87 0 1.62, rotation 0 0 0
  symmetric about XZ
  bounding box size 16.0317 36 0.685685
  totals: TotalSpan=36 TotalProjectedSpan=36 TotalChord=5.999 TotalArea=215.964 TotalAR=6.001
  root: chord 8.57, twist 0, NACA 64-series A=1 IdealCl=0 ThickChord=0.08
  sections:
    n  Span  Root_Chord  Tip_Chord  Area     Sweep  Sweep_Location  Dihedral  Twist  Twist_Location  tip airfoil
    1  18    8.57        3.428      107.982  35     0               0         0      0.25            as above

Wing "Wing10"
  location (X Y Z) 18.8 0 1.62, rotation 0 0 0
  symmetric about XZ
  bounding box size 14.4895 29.39 0.840095
  totals: TotalSpan=29.39 TotalProjectedSpan=29.39 TotalChord=7.35 TotalArea=216.016 TotalAR=3.99864
  root: chord 10.5, twist 0, NACA 63-series A=1 IdealCl=0 ThickChord=0.08
  sections:
    n  Span    Root_Chord  Tip_Chord  Area     Sweep  Sweep_Location  Dihedral  Twist  Twist_Location  tip airfoil
    1  14.695  10.5        4.2        108.008  35     0               0         0      0.25            as above

Wing "Wing11"
  location (X Y Z) 18.84 0 1.62, rotation 0 0 0
  symmetric about XZ
  bounding box size 15.2604 32.86 0.751285
  totals: TotalSpan=32.86 TotalProjectedSpan=32.86 TotalChord=6.573 TotalArea=215.989 TotalAR=4.99924
  root: chord 9.39, twist 0, NACA 63-series A=1 IdealCl=0 ThickChord=0.08
  sections:
    n  Span   Root_Chord  Tip_Chord  Area     Sweep  Sweep_Location  Dihedral  Twist  Twist_Location  tip airfoil
    1  16.43  9.39        3.756      107.994  35     0               0         0      0.25            as above
