OpenVSP model (file version 5), 6 components.
Geometry view with OpenVSP parameter names; values to 6 digits, angles in degrees, lengths in the model's unit.
Overall bounding box: X_Min=0 X_Len=6.91031 Y_Min=-3.7913 Y_Len=7.5826 Z_Min=-3.92 Z_Len=3.92

Blank "Wing Blank"
  location (X Y Z) 0 0 0, rotation 0 0 0

Blank "Tires Blank"
  location (X Y Z) 0 0 0, rotation 0 0 0

Stack "Main Tires", child of "Tires Blank"
  location (X Y Z) 5.181 3.215 -3.295, rotation 0 0 90
  symmetric about XZ
  bounding box size 1.25 7.20321 1.25
  cross sections:
    n  XDelta  YDelta  ZDelta  shape
    0  0       0       0       point
    1  0       0       0       circle Circle_Diameter=1.15
    2  0.3     0       0       as above
    3  0       0       0       point

Blank "LG Blank"
  location (X Y Z) 0 0 0, rotation 0 0 0

Wing "LG_leg", child of "LG Blank"
  location (X Y Z) 3.895 1.396 -1.14, rotation 0 0 0
  symmetric about XZ
  bounding box size 1.26209 6.09074 2.01116
  totals: TotalSpan=5.01 TotalProjectedSpan=3.22037 TotalChord=0.415 TotalArea=2.07915 TotalAR=4.98798
  root: chord 0.58, twist 0, NACA 4-series Camber=0 CamberLoc=0.2 ThickChord=0.318182
  sections:
    n  Span   Root_Chord  Tip_Chord  Area     Sweep  Sweep_Location  Dihedral  Twist  Twist_Location  tip airfoil
    1  2.505  0.58        0.25       1.03957  22     0               -50       0      0.25            NACA 4-series Camber=0 CamberLoc=0.2 ThickChord=0.409091

Fuselage "Wheel Pants", child of "LG Blank"
  location (X Y Z) 4.1 3.37 -3.15, rotation 0 0 0
  symmetric about XZ
  bounding box size 2.81031 7.5826 1.085
  Design: Length=2.8
  cross sections:
    n  XLocPercent  YLocPercent  ZLocPercent  shape
    0  0            0            0            point
    1  0.112632     0            0            general fuselage BotStr=1.3 BotTanAngle=90 CornerRad=0 Height=0.76 LowStr=1.3 MaxWidthLoc=0 TopStr=1 TopTanAngle=90 UpStr=1 Width=0.73
    2  0.362037     0            0            general fuselage BotStr=1.3 BotTanAngle=90 CornerRad=0 Height=1.085 LowStr=1.3 MaxWidthLoc=0 TopStr=1 TopTanAngle=90 UpStr=1 Width=0.82
    3  0.726092     0            0            general fuselage BotStr=1.3 BotTanAngle=90 CornerRad=0 Height=0.65 LowStr=1.3 MaxWidthLoc=0 TopStr=1 TopTanAngle=90 UpStr=1 Width=0.449719
    4  1            0            0            ellipse Ellipse_Height=0.18 Ellipse_Width=0.06

VSPAERO settings: Sref=117.997 bref=25.14 cref=3.84667 Xcg=8.68553 Ycg=0.000141789 Zcg=-0.0642094 AlphaStart=2 AlphaEnd=6 AlphaNpts=17 BetaStart=0 BetaEnd=0 BetaNpts=1 MachStart=0.186 MachEnd=0.269 MachNpts=1 ReCref=5.0776e+06 Vinf=100 Rho=1.2
  control group "Elevators": DeflectionAngle=0
  control group "Ailerons": DeflectionAngle=0
  control group "Flaps": DeflectionAngle=0
