OpenVSP model (file version 4), 2 components.
Geometry view with OpenVSP parameter names; values to 6 digits, angles in degrees, lengths in the model's unit.
Overall bounding box: X_Min=0.00412341 X_Len=36.7937 Y_Min=-74.7784 Y_Len=149.557 Z_Min=0.00633428 Z_Len=3.35518

Wing "WingGeom_mtr"
  location (X Y Z) 0 0 0, rotation 0 0 0
  symmetric about XZ
  bounding box size 0.932904 3.77861 0.0791215
  mass: Density=0 Shell_Flag=1 Mass_Area=3.43 Mass_Prior=0
  totals: TotalSpan=3.76 TotalProjectedSpan=3.75642 TotalChord=0.25 TotalArea=0.94
  root: chord 0.4, twist 8.3274, airfoil file "Prandtl-d_center"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 ThickChord=0.1
  sections:
    n   Span   Root_Chord  Tip_Chord  Area      Sweep  Sweep_Location  Dihedral  Twist    Twist_Location  tip airfoil
    1   0.094  0.4         0.385      0.036895  24     0               2.5       8.5524   1               airfoil file "Prandtl-d_r01"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 ThickChord=0.1
    2   0.094  0.385       0.37       0.035485  24     0               2.5       8.7259   1               airfoil file "Prandtl-d_r02"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 ThickChord=0.1
    3   0.094  0.37        0.355      0.034075  24     0               2.5       8.8441   1               airfoil file "Prandtl-d_r03"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 ThickChord=0.1
    4   0.094  0.355       0.34       0.032665  24     0               2.5       8.903    1               airfoil file "Prandtl-d_r04"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 ThickChord=0.1
    5   0.094  0.34        0.325      0.031255  24     0               2.5       8.8984   1               airfoil file "Prandtl-d_r05"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 ThickChord=0.1
    6   0.094  0.325       0.31       0.029845  24     0               2.5       8.8257   1               airfoil file "Prandtl-d_r06"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 ThickChord=0.1
    7   0.094  0.31        0.295      0.028435  24     0               2.5       8.6801   1               airfoil file "Prandtl-d_r07"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 ThickChord=0.1
    8   0.094  0.295       0.28       0.027025  24     0               2.5       8.4565   1               airfoil file "Prandtl-d_r08"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 ThickChord=0.1
    9   0.094  0.28        0.265      0.025615  24     0               2.5       8.1492   1               airfoil file "Prandtl-d_r09"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 ThickChord=0.1
    10  0.094  0.265       0.25       0.024205  24     0               2.5       7.7522   1               airfoil file "Prandtl-d_r10"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 ThickChord=0.1
    11  0.094  0.25        0.235      0.022795  24     0               2.5       7.2592   1               airfoil file "Prandtl-d_r11"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 ThickChord=0.1
    12  0.094  0.235       0.22       0.021385  24     0               2.5       6.6634   1               airfoil file "Prandtl-d_r12"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 ThickChord=0.1
    13  0.094  0.22        0.205      0.019975  24     0               2.5       5.9579   1               airfoil file "Prandtl-d_r13"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 ThickChord=0.1
    14  0.094  0.205       0.19       0.018565  24     0               2.5       5.1362   1               airfoil file "Prandtl-d_r14"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 ThickChord=0.1
    15  0.094  0.19        0.175      0.017155  24     0               2.5       4.1927   1               airfoil file "Prandtl-d_r15"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 ThickChord=0.1
    16  0.094  0.175       0.16       0.015745  24     0               2.5       3.1253   1               airfoil file "Prandtl-d_r16"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 ThickChord=0.1
    17  0.094  0.16        0.145      0.014335  24     0               2.5       1.9394   1               airfoil file "Prandtl-d_r17"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 ThickChord=0.1
    18  0.094  0.145       0.13       0.012925  24     0               2.5       0.6589   1               airfoil file "Prandtl-d_r18"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 ThickChord=0.1
    19  0.094  0.13        0.115      0.011515  24     0               2.5       -0.6417  1               airfoil file "Prandtl-d_r19"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 ThickChord=0.1
    20  0.094  0.115       0.1        0.010105  24     0               2.5       -1.6726  1               airfoil file "Prandtl-d_tip"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 ThickChord=0.1

Wing "WingGeom_inch"
  location (X Y Z) 0 0 0, rotation 0 0 0
  symmetric about XZ
  bounding box size 36.6354 149.557 3.1121
  mass: Density=0 Shell_Flag=1 Mass_Area=0.00488 Mass_Prior=0
  totals: TotalSpan=147.6 TotalProjectedSpan=147.46 TotalChord=9.845 TotalArea=1453.12
  root: chord 15.75, twist 8.3274, airfoil file "Prandtl-d_center"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 ThickChord=0.1
  sections:
    n   Span  Root_Chord  Tip_Chord  Area     Sweep  Sweep_Location  Dihedral  Twist    Twist_Location  tip airfoil
    1   3.69  15.75       15.1595    57.028   24     0               2.5       8.5524   1               airfoil file "Prandtl-d_r01"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 ThickChord=0.1
    2   3.69  15.1595     14.569     54.8491  24     0               2.5       8.7259   1               airfoil file "Prandtl-d_r02"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 ThickChord=0.1
    3   3.69  14.569      13.9785    52.6701  24     0               2.5       8.8441   1               airfoil file "Prandtl-d_r03"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 ThickChord=0.1
    4   3.69  13.9785     13.388     50.4912  24     0               2.5       8.903    1               airfoil file "Prandtl-d_r04"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 ThickChord=0.1
    5   3.69  13.388      12.7975    48.3122  24     0               2.5       8.8984   1               airfoil file "Prandtl-d_r05"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 ThickChord=0.1
    6   3.69  12.7975     12.207     46.1333  24     0               2.5       8.8257   1               airfoil file "Prandtl-d_r06"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 ThickChord=0.1
    7   3.69  12.207      11.6165    43.9544  24     0               2.5       8.6801   1               airfoil file "Prandtl-d_r07"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 ThickChord=0.1
    8   3.69  11.6165     11.026     41.7754  24     0               2.5       8.4565   1               airfoil file "Prandtl-d_r08"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 ThickChord=0.1
    9   3.69  11.026      10.4355    39.5965  24     0               2.5       8.1492   1               airfoil file "Prandtl-d_r09"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 ThickChord=0.1
    10  3.69  10.4355     9.845      37.4175  24     0               2.5       7.7522   1               airfoil file "Prandtl-d_r10"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 ThickChord=0.1
    11  3.69  9.845       9.2545     35.2386  24     0               2.5       7.2592   1               airfoil file "Prandtl-d_r11"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 ThickChord=0.1
    12  3.69  9.2545      8.664      33.0596  24     0               2.5       6.6634   1               airfoil file "Prandtl-d_r12"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 ThickChord=0.1
    13  3.69  8.664       8.0735     30.8807  24     0               2.5       5.9579   1               airfoil file "Prandtl-d_r13"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 ThickChord=0.1
    14  3.69  8.0735      7.483      28.7017  24     0               2.5       5.1362   1               airfoil file "Prandtl-d_r14"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 ThickChord=0.1
    15  3.69  7.483       6.8925     26.5228  24     0               2.5       4.1927   1               airfoil file "Prandtl-d_r15"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 ThickChord=0.1
    16  3.69  6.8925      6.302      24.3439  24     0               2.5       3.1253   1               airfoil file "Prandtl-d_r16"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 ThickChord=0.1
    17  3.69  6.302       5.7115     22.1649  24     0               2.5       1.9394   1               airfoil file "Prandtl-d_r17"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 ThickChord=0.1
    18  3.69  5.7115      5.121      19.986   24     0               2.5       0.6589   1               airfoil file "Prandtl-d_r18"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 ThickChord=0.1
    19  3.69  5.121       4.5305     17.807   24     0               2.5       -0.6417  1               airfoil file "Prandtl-d_r19"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 ThickChord=0.1
    20  3.69  4.5305      3.94       15.6281  24     0               2.5       -1.6726  1               airfoil file "Prandtl-d_tip"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 ThickChord=0.1

VSPAERO settings: Sref=0.94 bref=3.76 cref=0.25 Xcg=0.475306 Ycg=0 Zcg=0.0571423 AlphaStart=-2 AlphaEnd=10 AlphaNpts=13 BetaStart=0 BetaEnd=0 BetaNpts=1 MachStart=0.03 MachEnd=0 MachNpts=1 ReCref=1e+07 Vinf=100 Rho=0.002377
