OpenVSP model (file version 5), 8 components.
Geometry view with OpenVSP parameter names; values to 6 digits, angles in degrees, lengths in the model's unit.
Overall bounding box: X_Min=0 X_Len=15.8896 Y_Min=-10.1168 Y_Len=20.2337 Z_Min=-1.45418 Z_Len=5.97166

Blank "Cuban 800"
  location (X Y Z) 0 0 0, rotation 0 0 0

Fuselage "FuselageGeom", child of "Cuban 800"
  location (X Y Z) 0 0 0, rotation 0 0 0
  bounding box size 15 2.70811 3.04986
  Design: Length=15
  cross sections:
    n  XLocPercent  YLocPercent  ZLocPercent  shape
    0  0            0            0            point
    1  0.0152934    0            0.0013587    circle Circle_Diameter=0.594059
    2  0.122347     0            0.013587     general fuselage BotStr=1.7385 BotTanAngle=90 CornerRad=0 Height=1.61508 LowStr=0.83 MaxWidthLoc=0 TopStr=1.10632 TopTanAngle=90 UpStr=0.83 Width=1.69613
    3  0.186922     0            0.0217391    general fuselage BotStr=1.68859 BotTanAngle=90 CornerRad=0 Height=1.86355 LowStr=0.83 MaxWidthLoc=0 TopStr=1.48895 TopTanAngle=90 UpStr=0.83 Width=2.13587
    4  0.247419     0            0.0461957    general fuselage BotStr=1.72186 BotTanAngle=90 CornerRad=0 Height=2.54685 LowStr=1.5 MaxWidthLoc=0 TopStr=1.48064 TopTanAngle=90 UpStr=1.11464 Width=2.38714
    5  0.366437     0            0.0597826    general fuselage BotStr=1.5 BotTanAngle=90 CornerRad=0 Height=2.67109 LowStr=1.77177 MaxWidthLoc=0 TopStr=1.43905 TopTanAngle=90 UpStr=0.83 Width=2.51278
    6  0.521161     0            0.0589564    general fuselage BotStr=1.7385 BotTanAngle=90 CornerRad=0 Height=2.17838 LowStr=1.73018 MaxWidthLoc=0 TopStr=1.54718 TopTanAngle=90 UpStr=0.83 Width=2.16216
    7  0.71634      0            0.0570505    general fuselage BotStr=1.44736 BotTanAngle=90 CornerRad=0 Height=1.42973 LowStr=1.83 MaxWidthLoc=0 TopStr=1.83 TopTanAngle=90 UpStr=1.04809 Width=1.36757
    8  0.913669     0            0.0529744    general fuselage BotStr=0.447364 BotTanAngle=71.1818 CornerRad=0 Height=0.617823 LowStr=0.83 MaxWidthLoc=0 TopStr=1.83 TopTanAngle=107.182 UpStr=1.04809 Width=0.553017
    9  1            0            0.0557065    point

Wing "WingGeom", child of "FuselageGeom"
  location (X Y Z) 3.6087 0 -0.139946, rotation 0 0 0
  symmetric about XZ
  bounding box size 3.30345 18.9734 1.01199
  totals: TotalSpan=19.0089 TotalProjectedSpan=18.9734 TotalChord=2.975 TotalArea=55.5794 TotalAR=6.47707
  root: chord 3.3, twist 0, NACA 5-digit CamberLoc=0.15 IdealCl=0.25 ThickChord=0.18
  sections:
    n  Span     Root_Chord  Tip_Chord  Area     Sweep  Sweep_Location  Dihedral  Twist  Twist_Location  tip airfoil
    1  4.00445  3.3         3.3        13.2147  0      0               3.5       0      0.25            NACA 5-digit CamberLoc=0.15 IdealCl=0.25 ThickChord=0.15
    2  5.5      3.3         2          14.575   4      0               3.5       0      0.25            as above

Fuselage "WingTips", child of "WingGeom"
  location (X Y Z) 2.26087 9.64101 0.740054, rotation -45 0 0; relative location -1.34783 9.64101 0.88, rotation -45 0 0
  symmetric about XZ
  bounding box size 5.6703 20.2337 0.954242
  Design: Length=5.6703
  cross sections:
    n  XLocPercent  YLocPercent  ZLocPercent  shape
    0  0            0            0            point
    1  0.277174     0            0.00475543   ellipse Ellipse_Height=1 Ellipse_Width=0.75
    2  0.681799     0            0            as above
    3  1            0            0            point

Fuselage "Motors", child of "WingGeom"
  location (X Y Z) 1.24207 3.40012 0.108, rotation 3.5 0 0
  symmetric about XZ
  bounding box size 5.5 8.48738 1.11074
  Design: Length=5.5
  cross sections:
    n  XLocPercent  YLocPercent  ZLocPercent  shape
    0  0            0            0.01         circle Circle_Diameter=0.01
    1  0.1          0            0.01         circle Circle_Diameter=0.6
    2  0.11         0            0.01         as above
    3  0.13         0            0            rounded rectangle RoundRectXSec_Radius=0.2 RoundedRect_Height=0.8 RoundedRect_Width=1.4
    4  0.579348     0            0            rounded rectangle RoundRectXSec_Radius=0.2 RoundedRect_Height=1 RoundedRect_Width=1.6
    5  1            0            0            rounded rectangle RoundRectXSec_Radius=0.2 RoundedRect_Height=0.6 RoundedRect_Width=1.1
    6  1            0            0            point

Propeller "PropGeom", child of "Motors"
  location (X Y Z) 1.6885 3.40175 0.163203, rotation 0 0 0; relative location 0.446429 0 0, rotation 0 0 0
  symmetric about XZ
  bounding box size 0.178909 10.41 3.23477
  Design: Diameter=3.6 NumBlade=3 Beta34=20 UseBeta34Flag=1 Feather=0 Rotate=0 Precone=0 ReverseFlag=0 FoldAngle=0 PropMode=0 AF=151.538 CLi=0.538798 Chord=0.177656 Solidity=0.169649 ConstructXoC=0.5 FeatherAxisXoC=0.5 FeatherOffsetXoC=0
  cross sections:
    n  RadiusFrac  shape
    0  0.2         ellipse Ellipse_Height=0.072 Ellipse_Width=0.144
    1  0.4         NACA 16-series Chord=0.29925 IdealCl=0.7 ThickChord=0.144074
    2  1           NACA 16-series Chord=0.234 IdealCl=0.2 ThickChord=0.03
  Chord along r/R (cubic Bezier): 0.2: 0.08, 0.333333: 0.15, 0.466667: 0.2, 0.6: 0.2, 0.716667: 0.2, 0.833333: 0.2, 0.95: 0.2, 0.966667: 0.2, 0.983333: 0.2, 1: 0.13
  Twist along r/R (PCHIP): 0.2: 46.75, 0.75: 20, 1: 13
  Thick along r/R (cubic Bezier): 0.2: 0.5, 0.233333: 0.3, 0.266667: 0.225, 0.3: 0.2, 0.4: 0.125, 0.5: 0.115, 0.6: 0.1, 0.733333: 0.075, 0.866667: 0.055, 1: 0.03
  CLI along r/R (cubic Bezier): 0.2: 0, 0.266667: 0.7, 0.333333: 0.7, 0.4: 0.7, 0.466667: 0.7, 0.533333: 0.7, 0.6: 0.7, 0.733333: 0.7, 0.866667: 0.7, 1: 0.2

Wing "TailV", child of "FuselageGeom"
  location (X Y Z) 9.32065 0 0.810122, rotation 90 0 0
  bounding box size 6.56894 0.550319 3.70735
  totals: TotalSpan=3.65261 TotalProjectedSpan=3.65261 TotalChord=4.06976 TotalArea=11.5707 TotalAR=1.15305
  root: chord 5.5, twist 0, NACA 4-series Camber=0 CamberLoc=0.2 ThickChord=0.1
  sections:
    n  Span      Root_Chord  Tip_Chord  Area     Sweep    Sweep_Location  Dihedral  Twist  Twist_Location  tip airfoil
    1  0.846133  5.5         5.73021    4.75112  0        0               0         0      0.25            NACA 4-series Camber=0 CamberLoc=0.2 ThickChord=0.05
    2  0.285646  5.73021     3.04157    1.25281  84.1455  0               0         0      0.25            NACA 4-series Camber=0 CamberLoc=0.2 ThickChord=0.08
    3  2.52083   3.04157     1.375      5.56672  43.6909  0               0         0      0.25            NACA 4-series Camber=0 CamberLoc=0.2 ThickChord=0.1

Wing "TailH", child of "FuselageGeom"
  location (X Y Z) 12.3098 0 0.825408, rotation 0 0 0
  symmetric about XZ
  bounding box size 2.33458 9.24446 0.233594
  totals: TotalSpan=8.65979 TotalProjectedSpan=8.65979 TotalChord=1.82614 TotalArea=15.814 TotalAR=4.74212
  root: chord 2.33458, twist 0, NACA 4-series Camber=0 CamberLoc=0.2 ThickChord=0.1
  sections:
    n  Span    Root_Chord  Tip_Chord  Area     Sweep    Sweep_Location  Dihedral  Twist  Twist_Location  tip airfoil
    1  4.3299  2.33458     1.31771    7.90702  8.31818  0               0         0      0.25            as above

VSPAERO settings: Sref=55.5794 bref=19.0089 cref=2.975 Xcg=6.10841 Ycg=0 Zcg=0.628539 AlphaStart=1 AlphaEnd=10 AlphaNpts=10 BetaStart=0 BetaEnd=0 BetaNpts=1 MachStart=0.3 MachEnd=0 MachNpts=1 ReCref=1e+07 Vinf=100 Rho=0.002377
